Aircraft_592
0.00                    | Mach
0	0	0               | iYsym  iZsym  Zsym
0.625 0.25 2.5
0.000	0.000	0.000   | Xref   Yref   Zref
0.0350                  | CDp

###################################################
###################################################

################################...Wing
SURFACE
mainwing
5 1 30 0
YDUPLICATE
0
ANGLE
0.000000
#*****************************************************
SECTION
0.0 0.0 0.0 0.25 0.0
AFILE
opcao_aerofolio.dat
CLAF
0.9191
CDCL
0.52 0.06 1 0.0155 2.25 0.05
#*****************************************************
SECTION
0.0 1.25 0.0 0.25 0.0
AFILE
opcao_aerofolio.dat
CLAF
0.9191
CDCL
0.52 0.06 1 0.0155 2.25 0.05
#*****************************************************
TRANSLATE
0.0000 0.0000 0.0000
COMPONENT
1


################################...Hor. Stabilizer
SURFACE
HorizontalStabilizer
5 1 13 -1
YDUPLICATE
0
ANGLE
0.000000
#*****************************************************
SECTION
0.0 0.0 0.0 0.13762 0.0
AFILE
naca0012.dat
CLAF
0.9434
CDCL
-1.0765 0.0602 -0.0404 0.0181 1.0163 0.1030
CONTROL
elevator 1 0 0 1 0 1
#*****************************************************
SECTION
0.0 0.27524 0.0 0.13762 0.0
AFILE
naca0012.dat
CLAF
0.9434
CDCL
-1.0765 0.0602 -0.0404 0.0181 1.0163 0.1030
CONTROL
elevator 1 0 0 1 0 1
#*****************************************************
TRANSLATE
0.97809 0.0 0
COMPONENT
2


################################...Ver. Stabilizer
SURFACE
Rudder
5 1 9 -1
ANGLE
0.000000
#*****************************************************
SECTION
0.0 0.0 0.0 0.13762 0.0
AFILE
naca0012.dat
CLAF
0.9434
CDCL
-1.0765 0.0602 -0.0404 0.0181 1.0163 0.1030
#*****************************************************
SECTION
0.0 0.0 0.27524 0.13762 0.0
AFILE
naca0012.dat
CLAF
0.9434
CDCL
-1.0765 0.0602 -0.0404 0.0181 1.0163 0.1030
#*****************************************************
TRANSLATE
0.98441 0.0 0
COMPONENT
2
